P2000 := 0
P1011 := 0
P1000 := 0
P2111 := 0
P2010 := 0
P1111 := 0
P1010 := 0
P2211 := 0
P2011 := 0
P1211 := 0
P1001 := 0
pi1 := 0.6
pi2 := 0.5
Given
P2000 == 0
P1000 == 1*P2000 + (1 - pi1)*P2010 + (1 - pi1)*(1 - pi2)*P2011
P2010 == 1*P1000 + (1 - pi1)*P1010 + (1 - pi2)*P1001 + (1 - pi1)*(1 - pi2)*P1011
P1010 == pi1*P2010 + pi1*(1 - pi2)*P2011 + (1 - pi1)*(1 - pi2)*P2111
P2011 == pi1*P1010 + (1 - pi1)*(1 - pi2)*P1111 + pi2*P1001 + (pi2*(1 - pi1) + pi1*(1 - pi2))*P1011
P1001 == pi2*(1 - pi1)*P2011
P1011 == pi1*pi2*P2011 + (pi2*(1 - pi1) + pi1*(1 - pi2))*P2111 + (1 - pi1)*(1 - pi2)*P2211
P2111 == pi1*pi2*P1011 + (pi2*(1 - pi1) + pi1*(1 - pi2))*P1111 + (1 - pi1)*(1 - pi2)*P1211
P1111 == pi1*pi2*P2111 + (pi2*(1 - pi1) + pi1*(1 - pi2))*P2211
P2211 == pi1*pi2*P1111 + (pi1*pi2 + pi2*(1 - pi1) + pi1*(1 - pi2))*P1211
P1211 == pi1*pi2*P2211
P2000 + P1000 + P2010 + P1010 + P2011 + P1001 + P1011 + P2111 + P1111 + P2211 + P1211 == 1
[P2000; P1000; P2010; P1010; P2011; P1001; P1011; P2111; P1111; P2211; P1211] := Find(P2000, P1000, P2010, P1010, P2011, P1001, P1011, P2111, P1111, P2211, P1211) = [0; 0.148544; 0.273907; 0.228251; 0.194904; 0.0389808; 0.0728626; 0.0271787; 0.0101586; 0.00400997; 0.00120299]
Lqueue := P2111 + P1111 + 2*P2211 + 2*P1211 = 0.0477632
A := P2010 + P1010 + P1001 + 2*(P2011 + P1011 + P2111 + P1111 + P2211 + P1211) = 1.16177
