μ_1 := 5
n_1 := 2
ω_1(λ) := λ/μ_1
p_1(λ) :=
    1/(n_1 + 2) if ω_1(λ) == 1
    (1 - ω_1(λ))/(1 - ω_1(λ)^(n_1 + 2)) otherwise
μ_2 := 5
n_2 := 2
P_отк1(λ) := ω_1(λ)^(n_1 + 1)*p_1(λ)
ω_2(λ) := λ*(1 - P_отк1(λ))/μ_2
p_2(λ) :=
    1/(n_2 + 2) if ω_2(λ) == 1
    (1 - ω_2(λ))/(1 - ω_2(λ)^(n_2 + 2)) otherwise
P_отк2(λ) := ω_2(λ)^(n_2 + 1)*p_2(λ)
P_отк(λ) := 1 - (1 - P_отк1(λ))*(1 - P_отк2(λ))
λ := [1; 1.5; 2; 2.5; 3; 3.5; 4; 4.5; 5; 5.5; 6]
P_oтк := [
    P_отк(1);
    P_отк(1.5);
    P_отк(2);
    P_отк(2.5);
    P_отк(3);
    P_отк(3.5);
    P_отк(4);
    P_отк(4.5);
    P_отк(5);
    P_отк(5.5);
    P_отк(6)
]
P_oтк1 := [
    P_отк1(1);
    P_отк1(1.5);
    P_отк1(2);
    P_отк1(2.5);
    P_отк1(3);
    P_отк1(3.5);
    P_отк1(4);
    P_отк1(4.5);
    P_отк1(5);
    P_отк1(5.5);
    P_отк1(6)
] = [0.00641026; 0.0190543; 0.0394089; 0.0666667; 0.0992647; 0.135413; 0.173442; 0.21198; 0.25; 0.286792; 0.321908]
P_oтк2 := [
    P_отк2(1);
    P_отк2(1.5);
    P_отк2(2);
    P_отк2(2.5);
    P_отк2(3);
    P_отк2(3.5);
    P_отк2(4);
    P_отк2(4.5);
    P_отк2(5);
    P_отк2(5.5);
    P_отк2(6)
] = [0.00629759; 0.0181217; 0.0357092; 0.0569011; 0.0793071; 0.101076; 0.121095; 0.138863; 0.154286; 0.167494; 0.178722]
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P_отк1(5) = 0.25
P_отк2(5) = 0.154286
P_отк(5) = 0.365714
